// SBML level 2 version 1

model Proctor2005_Hsp90()
  // Proctor2005 - Actions of chaperones and their role in ageing
  // This model is described in the article:
  // Modelling the actions of chaperones and their role in ageing.
  // Proctor CJ, Soti C, Boys RJ, Gillespie CS, Shanley DP, Wilkinson DJ, Kirkwood TB.
  // Mech. Ageing Dev. 2005 Jan; 126(1): 119-131
  // Abstract:
  // Many molecular chaperones are also known as heat shock proteins because they are synthesised in increased amounts after brief exposure of cells to elevated temperatures. They have many cellular functions and are involved in the folding of nascent proteins, the re-folding of denatured proteins, the prevention of protein aggregation, and assisting the targeting of proteins for degradation by the proteasome and lysosomes. They also have a role in apoptosis and are involved in modulating signals for immune and inflammatory responses. Stress-induced transcription of heat shock proteins requires the activation of heat shock factor (HSF). Under normal conditions, HSF is bound to heat shock proteins resulting in feedback repression. During stress, cellular proteins undergo denaturation and sequester heat shock proteins bound to HSF, which is then able to become transcriptionally active. The induction of heat shock proteins is impaired with age and there is also a decline in chaperone function. Aberrant/damaged proteins accumulate with age and are implicated in several important age-related conditions (e.g. Alzheimer's disease, Parkinson's disease, and cataract). Therefore, the balance between damaged proteins and available free chaperones may be greatly disturbed during ageing. We have developed a mathematical model to describe the heat shock system. The aim of the model is two-fold: to explore the heat shock system and its implications in ageing; and to demonstrate how to build a model of a biological system using our simulation system (biology of ageing e-science integration and simulation (BASIS)).
  // This model is hosted on BioModels Database and identified by: BIOMD0000000091.
  // To cite BioModels Database, please use: BioModels Database: An enhanced, curated and annotated resource for published quantitative kinetic models.
  // To the extent possible under law, all copyright and related or neighbouring rights to this encoded model have been dedicated to the public domain worldwide. Please refer to CC0 Public Domain Dedication for more information.
  // biomodels.db:MODEL2223638385
  // biomodels.db:BIOMD0000000091
  // isDescribedBy pubmed:15610770
  // isVersionOf GO:0051085 GO:0007569 GO:0009408
  // hasTaxon taxonomy:131567
  // hasVersion DOID:10652 DOID:14330 DOID:83

  // Compartments:
  compartment compartment = 1;  // isVersionOf GO:0005623

  // Species:
  substanceOnly species Hsp90 in compartment = 300000;  // interpro:IPR001404
  substanceOnly species HCom in compartment = 5900;  // isVersionOf GO:0043234
  substanceOnly species HSF1 in compartment = 100;  // isVersionOf interpro:IPR000232
  substanceOnly species MisP in compartment = 0;
  substanceOnly species MCom in compartment = 0;  // isVersionOf GO:0043234
  substanceOnly species TriH in compartment = 0;  // isVersionOf GO:0043234; hasPart interpro:IPR000232
  substanceOnly species DiH in compartment = 0;  // isVersionOf GO:0043234; hasPart interpro:IPR000232
  substanceOnly species NatP in compartment = 6000000;
  substanceOnly species AggP in compartment = 0;
  substanceOnly species HSE in compartment = 1;
  substanceOnly species HSETriH in compartment = 0;
  substanceOnly species ROS in compartment = 100;  // isVersionOf CHEBI:26523
  substanceOnly species ATP in compartment = 10000;  // CHEBI:15422 kegg.compound:C00002
  substanceOnly species ADP in compartment = 1000;  // CHEBI:16761 kegg.compound:C00008
  substanceOnly species $source in compartment = 1;
  substanceOnly species MisH in compartment = 0;

  // Parameters:
  k1 = 10;
  k2 = 2e-5;
  k3 = 50;
  k4 = 1e-5;
  k5 = 4e-6;
  k6 = 6e-7;
  k7 = 1e-7;
  k8 = 500;
  k9 = 1;
  k10 = 0.01;
  k11 = 100;
  k12 = 0.5;
  k13 = 0.5;
  k14 = 0.05;
  k15 = 0.08;
  k16 = 1000;
  k17 = 1.52e-7;
  k18 = 12;
  k19 = 0.02;
  k20 = 0.1;
  k21 = 1e-5;
  k22 = 1e-6;
  k23 = 1e-7;

  // Reactions:
  proteinSynthesis: => NatP; k1;  // isVersionOf GO:0009059
  misfolding: NatP + ROS => MisP + ROS; k2*NatP*ROS;  // hasVersion GO:0022417
  Hsp90MisPBinding: MisP + Hsp90 => MCom; k3*MisP*Hsp90;  // isVersionOf GO:0051879
  unsuccessulRefolding: MCom => MisP + Hsp90; k4*MCom; unsuccessulRefolding is "unsuccessfulRefolding";  // isVersionOf GO:0043624
  refolding: MCom + ATP => Hsp90 + NatP + ADP; k5*MCom*ATP;  // isVersionOf GO:0042026 GO:0016887
  proteinDegradation: MisP + ATP => ADP; k6*MisP*ATP;  // isVersionOf GO:0016887
  proteinAggregation1: 2 MisP => AggP; (MisP - 1)*k7*MisP/2;  // isVersionOf GO:0043623
  proteinAggregation2: MisP + AggP => 2 AggP; k7*MisP*AggP;  // isVersionOf GO:0043623
  Hsp90HSF1Binding: Hsp90 + HSF1 => HCom; k8*Hsp90*HSF1;  // isVersionOf GO:0051879
  Hsp90HSF1Release: HCom => Hsp90 + HSF1; k9*HCom;  // isVersionOf GO:0043624
  dimerisation: 2 HSF1 => DiH; (HSF1 - 1)*k10*HSF1/2;  // isVersionOf GO:0043623
  trimerisation: HSF1 + DiH => TriH; k11*HSF1*DiH;  // isVersionOf GO:0043623
  deTrimerisation: TriH => HSF1 + DiH; k12*TriH;  // isVersionOf GO:0043624
  deDimerisation: DiH => 2 HSF1; k13*DiH;  // isVersionOf GO:0043624
  HSETriHBinding: TriH + HSE => HSETriH; k14*HSE*TriH;  // isVersionOf GO:0043623
  HSETriHRelease: HSETriH => HSE + TriH; k15*HSETriH;  // isVersionOf GO:0043624
  Hsp90Transcription: HSETriH => HSETriH + Hsp90; k16*HSETriH;  // isVersionOf GO:0006351
  Hsp90Degradation: Hsp90 + ATP => ADP; k17*Hsp90*ATP;  // isVersionOf GO:0044257 GO:0016887
  ATPformation: ADP => ATP; k18*ADP;  // isVersionOf GO:0006757
  ATPconsumption: ATP => ADP; k19*ATP;  // isVersionOf GO:0016887
  radicalFormation: => ROS; k20;  // isPartOf GO:0006800
  radicalScavenging: ROS => ; k21*ROS;  // isVersionOf GO:0016209
  Hsp90Misfolding: Hsp90 + ROS => MisH + ROS; k22*Hsp90*ROS;
  MisHDegradation: MisH + ATP => ADP; k17*MisH*ATP;
  MisHAggregation_Dimerisation: 2 MisH => AggP; k23*MisH*(MisH - 1)/2;
  MisHAggregation_MisPBinding: MisH + MisP => AggP; k23*MisH*MisP;
  MisHAggregation_AggPBinding: MisH + AggP => AggP; k23*MisH*AggP;

  // Unit definitions:
  unit substance = item;
end
